#1 General
units           metal
dimension       3
atom_style      atomic
neighbor        0.3 bin

#2 Structure
boundary        p p p
read_data       structure_ortho.lammps
mass 1 78.971
mass 2 183.84
mass 3 78.971
mass 4 78.971
mass 5 183.84
mass 6 78.971
mass 7 78.971
mass 8 183.84
mass 9 78.971
mass 10 78.971
mass 11 183.84
mass 12 78.971
mass 13 78.971
mass 14 183.84
mass 15 78.971
mass 16 78.971
mass 17 183.84
mass 18 78.971
mass 19 78.971
mass 20 183.84
mass 21 78.971
mass 22 78.971
mass 23 183.84
mass 24 78.971

#3 Potential definitions
pair_style hybrid/overlay sw/mod sw/mod kolmogorov/crespi/z 14.0 kolmogorov/crespi/z 14.0 kolmogorov/crespi/z 14.0 kolmogorov/crespi/z 14.0 kolmogorov/crespi/z 14.0 kolmogorov/crespi/z 14.0 kolmogorov/crespi/z 14.0 kolmogorov/crespi/z 14.0 kolmogorov/crespi/z 14.0 kolmogorov/crespi/z 14.0 kolmogorov/crespi/z 14.0 kolmogorov/crespi/z 14.0 kolmogorov/crespi/z 14.0 kolmogorov/crespi/z 14.0 kolmogorov/crespi/z 14.0 kolmogorov/crespi/z 14.0 kolmogorov/crespi/z 14.0 kolmogorov/crespi/z 14.0 kolmogorov/crespi/z 14.0 kolmogorov/crespi/z 14.0 kolmogorov/crespi/z 14.0 kolmogorov/crespi/z 14.0 kolmogorov/crespi/z 14.0 kolmogorov/crespi/z 14.0 kolmogorov/crespi/z 14.0 kolmogorov/crespi/z 14.0 kolmogorov/crespi/z 14.0 kolmogorov/crespi/z 14.0 kolmogorov/crespi/z 14.0 kolmogorov/crespi/z 14.0 kolmogorov/crespi/z 14.0 kolmogorov/crespi/z 14.0 kolmogorov/crespi/z 14.0 kolmogorov/crespi/z 14.0 kolmogorov/crespi/z 14.0 kolmogorov/crespi/z 14.0 kolmogorov/crespi/z 14.0 kolmogorov/crespi/z 14.0 kolmogorov/crespi/z 14.0 kolmogorov/crespi/z 14.0 kolmogorov/crespi/z 14.0 kolmogorov/crespi/z 14.0 kolmogorov/crespi/z 14.0 kolmogorov/crespi/z 14.0 kolmogorov/crespi/z 14.0 kolmogorov/crespi/z 14.0 kolmogorov/crespi/z 14.0 kolmogorov/crespi/z 14.0 kolmogorov/crespi/z 14.0 kolmogorov/crespi/z 14.0 kolmogorov/crespi/z 14.0 kolmogorov/crespi/z 14.0 kolmogorov/crespi/z 14.0 kolmogorov/crespi/z 14.0 kolmogorov/crespi/z 14.0 kolmogorov/crespi/z 14.0 kolmogorov/crespi/z 14.0 kolmogorov/crespi/z 14.0 kolmogorov/crespi/z 14.0 kolmogorov/crespi/z 14.0 kolmogorov/crespi/z 14.0 kolmogorov/crespi/z 14.0 kolmogorov/crespi/z 14.0 kolmogorov/crespi/z 14.0 lj/cut 10.0

#4 Intralayer interactions
pair_coeff * * sw/mod 1 h-wse2.sw Se1 W1 Se2 Se3 W2 Se4 Se5 W3 Se6 Se7 W4 Se8 NULL NULL NULL NULL NULL NULL NULL NULL NULL NULL NULL NULL
pair_coeff * * sw/mod 2 h-wse2.sw NULL NULL NULL NULL NULL NULL NULL NULL NULL NULL NULL NULL Se1 W1 Se2 Se3 W2 Se4 Se5 W3 Se6 Se7 W4 Se8

#5 Interlayer interactions
pair_coeff 1 15 kolmogorov/crespi/z 1 MoWSSe.KC Se NULL NULL NULL NULL NULL NULL NULL NULL NULL NULL NULL NULL NULL Se NULL NULL NULL NULL NULL NULL NULL NULL NULL
pair_coeff 1 18 kolmogorov/crespi/z 2 MoWSSe.KC Se NULL NULL NULL NULL NULL NULL NULL NULL NULL NULL NULL NULL NULL NULL NULL NULL Se NULL NULL NULL NULL NULL NULL
pair_coeff 1 21 kolmogorov/crespi/z 3 MoWSSe.KC Se NULL NULL NULL NULL NULL NULL NULL NULL NULL NULL NULL NULL NULL NULL NULL NULL NULL NULL NULL Se NULL NULL NULL
pair_coeff 1 24 kolmogorov/crespi/z 4 MoWSSe.KC Se NULL NULL NULL NULL NULL NULL NULL NULL NULL NULL NULL NULL NULL NULL NULL NULL NULL NULL NULL NULL NULL NULL Se
pair_coeff 4 15 kolmogorov/crespi/z 5 MoWSSe.KC NULL NULL NULL Se NULL NULL NULL NULL NULL NULL NULL NULL NULL NULL Se NULL NULL NULL NULL NULL NULL NULL NULL NULL
pair_coeff 4 18 kolmogorov/crespi/z 6 MoWSSe.KC NULL NULL NULL Se NULL NULL NULL NULL NULL NULL NULL NULL NULL NULL NULL NULL NULL Se NULL NULL NULL NULL NULL NULL
pair_coeff 4 21 kolmogorov/crespi/z 7 MoWSSe.KC NULL NULL NULL Se NULL NULL NULL NULL NULL NULL NULL NULL NULL NULL NULL NULL NULL NULL NULL NULL Se NULL NULL NULL
pair_coeff 4 24 kolmogorov/crespi/z 8 MoWSSe.KC NULL NULL NULL Se NULL NULL NULL NULL NULL NULL NULL NULL NULL NULL NULL NULL NULL NULL NULL NULL NULL NULL NULL Se
pair_coeff 7 15 kolmogorov/crespi/z 9 MoWSSe.KC NULL NULL NULL NULL NULL NULL Se NULL NULL NULL NULL NULL NULL NULL Se NULL NULL NULL NULL NULL NULL NULL NULL NULL
pair_coeff 7 18 kolmogorov/crespi/z 10 MoWSSe.KC NULL NULL NULL NULL NULL NULL Se NULL NULL NULL NULL NULL NULL NULL NULL NULL NULL Se NULL NULL NULL NULL NULL NULL
pair_coeff 7 21 kolmogorov/crespi/z 11 MoWSSe.KC NULL NULL NULL NULL NULL NULL Se NULL NULL NULL NULL NULL NULL NULL NULL NULL NULL NULL NULL NULL Se NULL NULL NULL
pair_coeff 7 24 kolmogorov/crespi/z 12 MoWSSe.KC NULL NULL NULL NULL NULL NULL Se NULL NULL NULL NULL NULL NULL NULL NULL NULL NULL NULL NULL NULL NULL NULL NULL Se
pair_coeff 10 15 kolmogorov/crespi/z 13 MoWSSe.KC NULL NULL NULL NULL NULL NULL NULL NULL NULL Se NULL NULL NULL NULL Se NULL NULL NULL NULL NULL NULL NULL NULL NULL
pair_coeff 10 18 kolmogorov/crespi/z 14 MoWSSe.KC NULL NULL NULL NULL NULL NULL NULL NULL NULL Se NULL NULL NULL NULL NULL NULL NULL Se NULL NULL NULL NULL NULL NULL
pair_coeff 10 21 kolmogorov/crespi/z 15 MoWSSe.KC NULL NULL NULL NULL NULL NULL NULL NULL NULL Se NULL NULL NULL NULL NULL NULL NULL NULL NULL NULL Se NULL NULL NULL
pair_coeff 10 24 kolmogorov/crespi/z 16 MoWSSe.KC NULL NULL NULL NULL NULL NULL NULL NULL NULL Se NULL NULL NULL NULL NULL NULL NULL NULL NULL NULL NULL NULL NULL Se
pair_coeff 2 14 kolmogorov/crespi/z 17 MoWSSe.KC NULL W NULL NULL NULL NULL NULL NULL NULL NULL NULL NULL NULL W NULL NULL NULL NULL NULL NULL NULL NULL NULL NULL
pair_coeff 2 17 kolmogorov/crespi/z 18 MoWSSe.KC NULL W NULL NULL NULL NULL NULL NULL NULL NULL NULL NULL NULL NULL NULL NULL W NULL NULL NULL NULL NULL NULL NULL
pair_coeff 2 20 kolmogorov/crespi/z 19 MoWSSe.KC NULL W NULL NULL NULL NULL NULL NULL NULL NULL NULL NULL NULL NULL NULL NULL NULL NULL NULL W NULL NULL NULL NULL
pair_coeff 2 23 kolmogorov/crespi/z 20 MoWSSe.KC NULL W NULL NULL NULL NULL NULL NULL NULL NULL NULL NULL NULL NULL NULL NULL NULL NULL NULL NULL NULL NULL W NULL
pair_coeff 5 14 kolmogorov/crespi/z 21 MoWSSe.KC NULL NULL NULL NULL W NULL NULL NULL NULL NULL NULL NULL NULL W NULL NULL NULL NULL NULL NULL NULL NULL NULL NULL
pair_coeff 5 17 kolmogorov/crespi/z 22 MoWSSe.KC NULL NULL NULL NULL W NULL NULL NULL NULL NULL NULL NULL NULL NULL NULL NULL W NULL NULL NULL NULL NULL NULL NULL
pair_coeff 5 20 kolmogorov/crespi/z 23 MoWSSe.KC NULL NULL NULL NULL W NULL NULL NULL NULL NULL NULL NULL NULL NULL NULL NULL NULL NULL NULL W NULL NULL NULL NULL
pair_coeff 5 23 kolmogorov/crespi/z 24 MoWSSe.KC NULL NULL NULL NULL W NULL NULL NULL NULL NULL NULL NULL NULL NULL NULL NULL NULL NULL NULL NULL NULL NULL W NULL
pair_coeff 8 14 kolmogorov/crespi/z 25 MoWSSe.KC NULL NULL NULL NULL NULL NULL NULL W NULL NULL NULL NULL NULL W NULL NULL NULL NULL NULL NULL NULL NULL NULL NULL
pair_coeff 8 17 kolmogorov/crespi/z 26 MoWSSe.KC NULL NULL NULL NULL NULL NULL NULL W NULL NULL NULL NULL NULL NULL NULL NULL W NULL NULL NULL NULL NULL NULL NULL
pair_coeff 8 20 kolmogorov/crespi/z 27 MoWSSe.KC NULL NULL NULL NULL NULL NULL NULL W NULL NULL NULL NULL NULL NULL NULL NULL NULL NULL NULL W NULL NULL NULL NULL
pair_coeff 8 23 kolmogorov/crespi/z 28 MoWSSe.KC NULL NULL NULL NULL NULL NULL NULL W NULL NULL NULL NULL NULL NULL NULL NULL NULL NULL NULL NULL NULL NULL W NULL
pair_coeff 11 14 kolmogorov/crespi/z 29 MoWSSe.KC NULL NULL NULL NULL NULL NULL NULL NULL NULL NULL W NULL NULL W NULL NULL NULL NULL NULL NULL NULL NULL NULL NULL
pair_coeff 11 17 kolmogorov/crespi/z 30 MoWSSe.KC NULL NULL NULL NULL NULL NULL NULL NULL NULL NULL W NULL NULL NULL NULL NULL W NULL NULL NULL NULL NULL NULL NULL
pair_coeff 11 20 kolmogorov/crespi/z 31 MoWSSe.KC NULL NULL NULL NULL NULL NULL NULL NULL NULL NULL W NULL NULL NULL NULL NULL NULL NULL NULL W NULL NULL NULL NULL
pair_coeff 11 23 kolmogorov/crespi/z 32 MoWSSe.KC NULL NULL NULL NULL NULL NULL NULL NULL NULL NULL W NULL NULL NULL NULL NULL NULL NULL NULL NULL NULL NULL W NULL
pair_coeff 1 14 kolmogorov/crespi/z 33 MoWSSe.KC Se NULL NULL NULL NULL NULL NULL NULL NULL NULL NULL NULL NULL W NULL NULL NULL NULL NULL NULL NULL NULL NULL NULL
pair_coeff 1 17 kolmogorov/crespi/z 34 MoWSSe.KC Se NULL NULL NULL NULL NULL NULL NULL NULL NULL NULL NULL NULL NULL NULL NULL W NULL NULL NULL NULL NULL NULL NULL
pair_coeff 1 20 kolmogorov/crespi/z 35 MoWSSe.KC Se NULL NULL NULL NULL NULL NULL NULL NULL NULL NULL NULL NULL NULL NULL NULL NULL NULL NULL W NULL NULL NULL NULL
pair_coeff 1 23 kolmogorov/crespi/z 36 MoWSSe.KC Se NULL NULL NULL NULL NULL NULL NULL NULL NULL NULL NULL NULL NULL NULL NULL NULL NULL NULL NULL NULL NULL W NULL
pair_coeff 4 14 kolmogorov/crespi/z 37 MoWSSe.KC NULL NULL NULL Se NULL NULL NULL NULL NULL NULL NULL NULL NULL W NULL NULL NULL NULL NULL NULL NULL NULL NULL NULL
pair_coeff 4 17 kolmogorov/crespi/z 38 MoWSSe.KC NULL NULL NULL Se NULL NULL NULL NULL NULL NULL NULL NULL NULL NULL NULL NULL W NULL NULL NULL NULL NULL NULL NULL
pair_coeff 4 20 kolmogorov/crespi/z 39 MoWSSe.KC NULL NULL NULL Se NULL NULL NULL NULL NULL NULL NULL NULL NULL NULL NULL NULL NULL NULL NULL W NULL NULL NULL NULL
pair_coeff 4 23 kolmogorov/crespi/z 40 MoWSSe.KC NULL NULL NULL Se NULL NULL NULL NULL NULL NULL NULL NULL NULL NULL NULL NULL NULL NULL NULL NULL NULL NULL W NULL
pair_coeff 7 14 kolmogorov/crespi/z 41 MoWSSe.KC NULL NULL NULL NULL NULL NULL Se NULL NULL NULL NULL NULL NULL W NULL NULL NULL NULL NULL NULL NULL NULL NULL NULL
pair_coeff 7 17 kolmogorov/crespi/z 42 MoWSSe.KC NULL NULL NULL NULL NULL NULL Se NULL NULL NULL NULL NULL NULL NULL NULL NULL W NULL NULL NULL NULL NULL NULL NULL
pair_coeff 7 20 kolmogorov/crespi/z 43 MoWSSe.KC NULL NULL NULL NULL NULL NULL Se NULL NULL NULL NULL NULL NULL NULL NULL NULL NULL NULL NULL W NULL NULL NULL NULL
pair_coeff 7 23 kolmogorov/crespi/z 44 MoWSSe.KC NULL NULL NULL NULL NULL NULL Se NULL NULL NULL NULL NULL NULL NULL NULL NULL NULL NULL NULL NULL NULL NULL W NULL
pair_coeff 10 14 kolmogorov/crespi/z 45 MoWSSe.KC NULL NULL NULL NULL NULL NULL NULL NULL NULL Se NULL NULL NULL W NULL NULL NULL NULL NULL NULL NULL NULL NULL NULL
pair_coeff 10 17 kolmogorov/crespi/z 46 MoWSSe.KC NULL NULL NULL NULL NULL NULL NULL NULL NULL Se NULL NULL NULL NULL NULL NULL W NULL NULL NULL NULL NULL NULL NULL
pair_coeff 10 20 kolmogorov/crespi/z 47 MoWSSe.KC NULL NULL NULL NULL NULL NULL NULL NULL NULL Se NULL NULL NULL NULL NULL NULL NULL NULL NULL W NULL NULL NULL NULL
pair_coeff 10 23 kolmogorov/crespi/z 48 MoWSSe.KC NULL NULL NULL NULL NULL NULL NULL NULL NULL Se NULL NULL NULL NULL NULL NULL NULL NULL NULL NULL NULL NULL W NULL
pair_coeff 2 15 kolmogorov/crespi/z 49 MoWSSe.KC NULL W NULL NULL NULL NULL NULL NULL NULL NULL NULL NULL NULL NULL Se NULL NULL NULL NULL NULL NULL NULL NULL NULL
pair_coeff 2 18 kolmogorov/crespi/z 50 MoWSSe.KC NULL W NULL NULL NULL NULL NULL NULL NULL NULL NULL NULL NULL NULL NULL NULL NULL Se NULL NULL NULL NULL NULL NULL
pair_coeff 2 21 kolmogorov/crespi/z 51 MoWSSe.KC NULL W NULL NULL NULL NULL NULL NULL NULL NULL NULL NULL NULL NULL NULL NULL NULL NULL NULL NULL Se NULL NULL NULL
pair_coeff 2 24 kolmogorov/crespi/z 52 MoWSSe.KC NULL W NULL NULL NULL NULL NULL NULL NULL NULL NULL NULL NULL NULL NULL NULL NULL NULL NULL NULL NULL NULL NULL Se
pair_coeff 5 15 kolmogorov/crespi/z 53 MoWSSe.KC NULL NULL NULL NULL W NULL NULL NULL NULL NULL NULL NULL NULL NULL Se NULL NULL NULL NULL NULL NULL NULL NULL NULL
pair_coeff 5 18 kolmogorov/crespi/z 54 MoWSSe.KC NULL NULL NULL NULL W NULL NULL NULL NULL NULL NULL NULL NULL NULL NULL NULL NULL Se NULL NULL NULL NULL NULL NULL
pair_coeff 5 21 kolmogorov/crespi/z 55 MoWSSe.KC NULL NULL NULL NULL W NULL NULL NULL NULL NULL NULL NULL NULL NULL NULL NULL NULL NULL NULL NULL Se NULL NULL NULL
pair_coeff 5 24 kolmogorov/crespi/z 56 MoWSSe.KC NULL NULL NULL NULL W NULL NULL NULL NULL NULL NULL NULL NULL NULL NULL NULL NULL NULL NULL NULL NULL NULL NULL Se
pair_coeff 8 15 kolmogorov/crespi/z 57 MoWSSe.KC NULL NULL NULL NULL NULL NULL NULL W NULL NULL NULL NULL NULL NULL Se NULL NULL NULL NULL NULL NULL NULL NULL NULL
pair_coeff 8 18 kolmogorov/crespi/z 58 MoWSSe.KC NULL NULL NULL NULL NULL NULL NULL W NULL NULL NULL NULL NULL NULL NULL NULL NULL Se NULL NULL NULL NULL NULL NULL
pair_coeff 8 21 kolmogorov/crespi/z 59 MoWSSe.KC NULL NULL NULL NULL NULL NULL NULL W NULL NULL NULL NULL NULL NULL NULL NULL NULL NULL NULL NULL Se NULL NULL NULL
pair_coeff 8 24 kolmogorov/crespi/z 60 MoWSSe.KC NULL NULL NULL NULL NULL NULL NULL W NULL NULL NULL NULL NULL NULL NULL NULL NULL NULL NULL NULL NULL NULL NULL Se
pair_coeff 11 15 kolmogorov/crespi/z 61 MoWSSe.KC NULL NULL NULL NULL NULL NULL NULL NULL NULL NULL W NULL NULL NULL Se NULL NULL NULL NULL NULL NULL NULL NULL NULL
pair_coeff 11 18 kolmogorov/crespi/z 62 MoWSSe.KC NULL NULL NULL NULL NULL NULL NULL NULL NULL NULL W NULL NULL NULL NULL NULL NULL Se NULL NULL NULL NULL NULL NULL
pair_coeff 11 21 kolmogorov/crespi/z 63 MoWSSe.KC NULL NULL NULL NULL NULL NULL NULL NULL NULL NULL W NULL NULL NULL NULL NULL NULL NULL NULL NULL Se NULL NULL NULL
pair_coeff 11 24 kolmogorov/crespi/z 64 MoWSSe.KC NULL NULL NULL NULL NULL NULL NULL NULL NULL NULL W NULL NULL NULL NULL NULL NULL NULL NULL NULL NULL NULL NULL Se
pair_coeff * * lj/cut 0.0 3.4

#6 Optimize at 0 K
dump            1 all custom 400 dump.minimization id type x y z
min_style       fire
minimize        0.0 1.0e-8 1000000 1000000
undump          1
write_dump      all custom dump.Final id type x y z modify sort id
print "Done!"
